OpenVSP model (file version 5), 4 components.
Geometry view with OpenVSP parameter names; values to 6 digits, angles in degrees, lengths in the model's unit.
Overall bounding box: X_Min=-4.21942 X_Len=21.6602 Y_Min=-17.47 Y_Len=34.9399 Z_Min=-1.86839 Z_Len=6.4738

Fuselage "FuselageGeom"
  location (X Y Z) -4.21942 0 0, rotation 0 0 0
  bounding box size 20.0328 2.8047 4.83888
  Design: Length=20.0328
  cross sections:
    n  XLocPercent  YLocPercent  ZLocPercent  shape
    0  0            0            0            point
    1  0.0107873    0            -0.00765153  ellipse Ellipse_Height=1.3022 Ellipse_Width=1.3599
    2  0.0313586    0            -0.0113745   ellipse Ellipse_Height=1.8408 Ellipse_Width=1.6512
    3  0.136646     0            -0.0214049   ellipse Ellipse_Height=2.4184 Ellipse_Width=2.3052
    4  0.205731     0            0.015        super ellipse Super_Height=4.33776 Super_M=4 Super_MaxWidthLoc=0 Super_N=4 Super_Width=2.4552
    5  0.31196      0            0.028        super ellipse Super_Height=4.73584 Super_M=4 Super_MaxWidthLoc=0 Super_N=4 Super_Width=2.4552
    6  0.47148      0            0.0170696    super ellipse Super_Height=3.70034 Super_M=4 Super_MaxWidthLoc=0 Super_N=4 Super_Width=2.3293
    7  1            0            0.03677      super ellipse Super_Height=1.4216 Super_M=4 Super_MaxWidthLoc=0 Super_N=4 Super_Width=0.15434

Wing "Wing"
  location (X Y Z) 0 0 2.044, rotation 0 2 0
  symmetric about XZ
  bounding box size 5.24873 34.9399 0.969456
  totals: TotalSpan=34.9 TotalProjectedSpan=34.897 TotalChord=4.30645 TotalArea=175.024 TotalAR=6.95791
  root: chord 5.25, twist 0, airfoil file "US35b"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 BaseThickChord=0.120841 ThickChord=0.120841
  sections:
    n  Span  Root_Chord  Tip_Chord  Area     Sweep   Sweep_Location  Dihedral  Twist  Twist_Location  tip airfoil
    1  1.5   5.25        5.25       7.875    0       0               0.75      0      0.25            as above
    2  13.5  5.25        5.25       70.875   0       0               0.75      0      0.25            as above
    3  1.45  5.25        3.8        6.56125  12.733  0               0.75      -1.37  0.25            as above
    4  1     3.8         0.60156    2.20078  55      0               0.75      -1.37  0.25            NACA 4-series Camber=0 CamberLoc=0.2 ThickChord=0.12

Wing "Tailplane", child of "Wing"
  location (X Y Z) 13.0163 0 1.08696, rotation 0 0 0
  symmetric about XZ
  bounding box size 3.91456 9.41788 0.380885
  totals: TotalSpan=9.41788 TotalProjectedSpan=9.41788 TotalChord=3.02125 TotalArea=27.4044 TotalAR=3.23657
  root: chord 2.11458, twist 0, NACA 4-series Camber=0 CamberLoc=0.2 ThickChord=0.1
  sections:
    n  Span      Root_Chord  Tip_Chord  Area     Sweep    Sweep_Location  Dihedral  Twist  Twist_Location  tip airfoil
    1  0.712633  2.11458     3.533      2.01233  3        0               0         0      0.25            as above
    2  0.816562  3.533       3.80664    2.99663  4.90909  0               0         0      0.25            as above
    3  0.707687  3.80664     3.68229    2.64991  10       0               0         0      0.25            as above
    4  1.25206   3.68229     2.81738    4.06899  25.4886  0               0         0      0.25            as above
    5  1.22      2.81738     0.419271   1.97436  49.0909  0               0         0      0.25            as above

Wing "TailFin", child of "Tailplane"
  location (X Y Z) 13.0435 0 0.0543478, rotation 90 0 0
  bounding box size 4.39729 0.21802 4.55106
  totals: TotalSpan=4.55106 TotalProjectedSpan=4.55106 TotalChord=2.99236 TotalArea=14.1614 TotalAR=1.46258
  root: chord 2.24859, twist 0, NACA 4-series Camber=0 CamberLoc=0.5 ThickChord=0.0535714
  sections:
    n  Span      Root_Chord  Tip_Chord  Area      Sweep    Sweep_Location  Dihedral  Twist  Twist_Location  tip airfoil
    1  0.791668  2.24859     4.35417    2.61359   0        0               0         0      0.25            NACA 4-series Camber=0 CamberLoc=0.5 ThickChord=0.05
    2  0.664389  4.35417     4.33664    2.88704   5.21591  0               0         0      0.25            as above
    3  2.57938   4.33664     1.89654    8.03887   32.0101  0               0         0      0.25            as above
    4  0.515626  1.89654     0.515625   0.621887  51.0568  0               0         0      0.25            NACA 4-series Camber=0 CamberLoc=0.2 ThickChord=0.05

VSPAERO settings: Sref=178.5 bref=35.208 cref=5.25 Xcg=1.575 Ycg=0 Zcg=0 AlphaStart=-10 AlphaEnd=18 AlphaNpts=15 BetaStart=0 BetaEnd=0 BetaNpts=1 MachStart=0.3 MachEnd=0 MachNpts=1 ReCref=1e+07 Vinf=122.326 Rho=0.002377
  control group "Wing_Aileron": DeflectionAngle=10
