OpenVSP model (file version 5), 8 components.
Geometry view with OpenVSP parameter names; values to 6 digits, angles in degrees, lengths in the model's unit.
Overall bounding box: X_Min=-0.667 X_Len=159.082 Y_Min=-71.1656 Y_Len=142.331 Z_Min=-8.5363 Z_Len=33.8527

Fuselage "FuselageGeom"
  location (X Y Z) -0.667 0 -0.0405, rotation 0 0 0
  bounding box size 133.573 13.3328 15.8958
  Design: Length=133.573
  cross sections:
    n  XLocPercent  YLocPercent  ZLocPercent  shape
    0  0            0            -0.0125315   point
    1  0.0302657    0            -0.0116402   ellipse Ellipse_Height=5.95618 Ellipse_Width=5.7336
    2  0.147744     0            0.00073817   ellipse Ellipse_Height=13.7171 Ellipse_Width=12.1916
    3  0.344872     0            0.00213933   as above
    4  0.416742     0            0            super ellipse Super_Height=14.8 Super_M=2 Super_M_bot=2 Super_MaxWidthLoc=-0.3 Super_N=2 Super_N_bot=4 Super_TopBotSym=0 Super_Width=12.5919
    5  0.678483     0            -0.00407125  super ellipse Super_Height=14.8 Super_M=2 Super_M_bot=2 Super_MaxWidthLoc=-0.3 Super_N=2 Super_N_bot=4 Super_TopBotSym=0 Super_Width=13.1336
    6  0.761748     0            0.000478107  ellipse Ellipse_Height=13 Ellipse_Width=12.0538
    7  0.995824     0            0.0117429    ellipse Ellipse_Height=1.59367 Ellipse_Width=1.6995
    8  1            0            0.0136656    point

Wing "Tailplane"
  location (X Y Z) 129.628 0 23.587, rotation 0 0 0
  symmetric about XZ
  bounding box size 28.7875 43.833 1.83506
  totals: TotalSpan=43.833 TotalProjectedSpan=43.833 TotalChord=13.2169 TotalArea=665.595 TotalAR=2.88664
  root: chord 18.34, twist 0, NACA 4-series Camber=0 CamberLoc=0.2 ThickChord=0.1
  sections:
    n  Span     Root_Chord  Tip_Chord  Area     Sweep    Sweep_Location  Dihedral  Twist  Twist_Location  tip airfoil
    1  17.669   18.34       14.5207    290.307  36.7273  0               0         0      0.25            as above
    2  4.24755  14.5207     5.48637    42.4905  67.2273  0               0         0      0.25            as above
  SS_Control "Elevator": UStart=0.296341 UEnd=0.718658 Length_C_Start=0.33571 Length_C_End=0.714929 Length_Start=5.91925 Length_End=4.73209 LE_Flag=0 Surf_Type=2

Pod "TailBullet", child of "Tailplane"
  location (X Y Z) 122.143 0 23.75, rotation 0 0 0
  bounding box size 29.5 3.13274 3.13274
  Design: FineRatio=18.8333 Length=29.5

Wing "WingGeom"
  location (X Y Z) 51.15 0 -4.02174, rotation 0 0 0
  symmetric about XZ
  bounding box size 60.8884 142.331 9.16452
  totals: TotalSpan=142.695 TotalProjectedSpan=142.331 TotalChord=23.669 TotalArea=2921.22 TotalAR=6.93483
  root: chord 39.8271, twist 4, airfoil file "VC10WingRoot"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 BaseThickChord=0.126344 ThickChord=0.126344
  sections:
    n  Span     Root_Chord  Tip_Chord  Area     Sweep    Sweep_Location  Dihedral  Twist  Twist_Location  tip airfoil
    1  21.3273  39.8271     23.4115    674.354  37.5855  0               4         4      0.25            airfoil file "VC10MainWing"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 BaseThickChord=0.096158 ThickChord=0.096158
    2  50.0202  23.4115     8.02613    786.257  36.0909  0               4.13043   4      0.25            as above
  SS_Control "Aileron": UStart=0.623476 UEnd=0.731707 Length_C_Start=0.239892 Length_C_End=0.324993 Length_Start=3.79333 Length_End=2.9743 LE_Flag=0 Surf_Type=2

Wing "TailFin"
  location (X Y Z) 83.227 0 2.82609, rotation 90 0 0
  bounding box size 58.3597 4.69206 20.0984
  totals: TotalSpan=20.0984 TotalProjectedSpan=20.0984 TotalChord=27.1861 TotalArea=497.97 TotalAR=0.81118
  root: chord 46.8933, twist 0, NACA 4-series Camber=0 CamberLoc=0.2 ThickChord=0.1
  sections:
    n  Span     Root_Chord  Tip_Chord  Area     Sweep    Sweep_Location  Dihedral  Twist  Twist_Location  tip airfoil
    1  4.88163  46.8933     31.6408    191.687  73.43    0               0         0      0.25            as above
    2  5.58816  31.6408     18.3153    139.581  71.9755  0               0         0      0.25            as above
    3  9.62856  18.3153     16.3112    166.702  41.3324  0               0         0      0.25            as above
  SS_Control "Rudder": UStart=0.237805 UEnd=0.756098 Length_C_Start=0.176829 Length_C_End=0.329268 Length_Start=7.7823 Length_End=5.51561 LE_Flag=0 Surf_Type=2

BodyOfRevolution "OuterEngines"
  location (X Y Z) 100.952 15.7143 1.19048, rotation 0 2.38095 -1.66667
  symmetric about XZ
  bounding box size 21.1445 37.1375 5.97103
  Design: A0=11.2784 Ae=4.43059 Amin=4.43059 AminW=0 Angle=1.92982 Diameter=3.78947 Mode=0
  profile: NACA 4-series Camber=0.02925 CamberLoc=0.15 Chord=20.9998 ThickChord=0.0583333

BodyOfRevolution "InnerEngines"
  location (X Y Z) 100.952 10.7143 1.19048, rotation 0 3 -5
  symmetric about XZ
  bounding box size 21.2447 26.7877 6.01676
  Design: A0=11.2784 Ae=4.43059 Amin=4.43059 AminW=0 Angle=1.92982 Diameter=3.78947 Mode=0
  profile: NACA 4-series Camber=0.02925 CamberLoc=0.15 Chord=20.9998 ThickChord=0.0583333

Wing "EnginePylon"
  location (X Y Z) 101.957 0 1.41304, rotation 0 0 0
  symmetric about XZ
  bounding box size 19.5786 15.8662 3.22307
  totals: TotalSpan=15.8662 TotalProjectedSpan=15.8662 TotalChord=19.4199 TotalArea=308.122 TotalAR=0.817008
  root: chord 19.2143, twist 8.24742, NACA 4-series Camber=0 CamberLoc=0.2 ThickChord=0.1
  sections:
    n  Span     Root_Chord  Tip_Chord  Area     Sweep     Sweep_Location  Dihedral  Twist  Twist_Location  tip airfoil
    1  7.93312  19.2143     19.6255    154.061  -1.52273  0               0         4      0.25            as above

VSPAERO settings: Sref=2851 bref=140.167 cref=20.017 Xcg=79.072 Ycg=0 Zcg=0 AlphaStart=-10 AlphaEnd=16 AlphaNpts=14 BetaStart=0 BetaEnd=5.73 BetaNpts=1 MachStart=0.1 MachEnd=0.9 MachNpts=1 ReCref=1e+07 Vinf=100 Rho=0.002377
  control group "aileronUp": DeflectionAngle=0
  control group "AileronDiff": DeflectionAngle=0
  control group "Elevator": DeflectionAngle=0
  control group "Rudder": DeflectionAngle=0
